# 1 шаговый метод
x := 0, 0.085 .. 0.85
f(x) := x - 1/(3 + sin(3.6*x))
x = [0; 0.085; 0.17; 0.255; 0.34; 0.425; 0.51; 0.595; 0.68; 0.765; 0.85]
f(x) = [-0.333333; -0.217916; -0.109759; -0.00854709; 0.0862229; 0.174948; 0.257796; 0.334668; 0.405222; 0.468963; 0.525483]
# 2.1 Уточнение корня по методу Ньютона
i := 0 .. 6
x[0] := 0.255
f1(x) := d/dx(f(x))
x[i + 1] := x[i] - f(x[i])/f1(x[i])
i = [0; 1; 2; 3; 4; 5; 6]
x[i] = [0.255; 0.26242; 0.262441; 0.262441; 0.262441; 0.262441; 0.262441]
f(x[i]) = [-0.00854709; -2.445e-5; -2.01487e-10; 0; 0; 0; 0]
# 2.2 Определение корня с машинной точностью на первом интервале изоляции
a := 0
b := 0.85
xc := (a + b)/2
f(a)*f(b) = -0.175161
Given
f(xc) == 0
xk := Find(xc)
xk = 0.262441
f(xk) = 0
# 2.3 Определение корня с заданной точностью
TOL := 0.1
x0 := 0
xk := root(f(x0), x0)
xk = 0.262441
# 3 Уточнение корня методом половинного детения
int(a, b) := if(f(a)*f(xc) < 0, [a; xc], [xc; b])
int(a, b) = [0; 0.425]
a[0] := 0
b[0] := 0.85
[a[i + 1]; b[i + 1]] := int(a[i], b[i])
i = [0; 1; 2; 3; 4; 5; 6]
a[i] = [0; 0; 0; 0; 0; 0; 0]
b[i] = [0.85; 0.425; 0.425; 0.425; 0.425; 0.425; 0.425]
f(a[i]) = [-0.333333; -0.333333; -0.333333; -0.333333; -0.333333; -0.333333; -0.333333]
f(b[i]) = [0.525483; 0.174948; 0.174948; 0.174948; 0.174948; 0.174948; 0.174948]
# 3.2 метод простой итерации
a := 0.255
b := 0.34
f1(x) := d/dx(f(x))
λ := 1/max(f1(a), f1(b))
λ = 0.868146
x[i + 1] := x[i] - λ*f(x[i])
x[i] = [0.255; 0.26242; 0.262441; 0.262441; 0.262441; 0.262441; 0.262441]
f(x[i]) = [-0.00854709; -2.445e-5; -1.39928e-7; -8.01959e-10; -4.59627e-12; -2.63123e-14; -1.11022e-16]
