X := [0.1; 0.3; 0.4; 0.6; 0.9]
Y := [0.2; 0.45; 0.55; 0.7; 0.7]
i := 0 .. 4
t := 0.1, 0.108 .. 0.9
N11(t) := Y[0] + ((Y[1] - Y[0])/(X[1] - X[0]))*(t - X[0])
N12(t) := Y[0] + ((Y[2] - Y[1])/(X[2] - X[1]))*(t - X[1])
N13(t) := Y[0] + ((Y[3] - Y[2])/(X[3] - X[2]))*(t - X[2])
N14(t) := Y[0] + ((Y[4] - Y[3])/(X[4] - X[3]))*(t - X[3])
F1(t) := if(t < X[1], N11(t), if(t < X[2], N12(t), if(t < X[3], N13(t), N14(t))))
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