# Метод гауса
A := [7, 1, 3, 2; 0, 5, 4, 0; 0, 1, 18, -3; 1, 2, -7, 15]
B := [2; 3; 4; 5]
x := A^-1*B
x = [-0.000883615; 0.385004; 0.268745; 0.407473]
B1 := A*x
B1 = [2; 3; 4; 5]
# Метод простой итерации
ORIGIN := 1
k := 1 .. 10
x1[1] := 0
x2[1] := 0
x3[1] := 0
x4[1] := 0
[x1[k + 1]; x2[k + 1]; x3[k + 1]; x4[k + 1]] := [
    (B[1] - A[1, 2]*x2[k] - A[1, 3]*x3[k] - A[1, 4]*x4[k])/A[1, 1];
    (B[2] - A[2, 1]*x1[k] - A[2, 3]*x3[k] - A[2, 4]*x4[k])/A[2, 2];
    (B[3] - A[3, 1]*x1[k] - A[3, 2]*x2[k] - A[3, 4]*x4[k])/A[3, 3];
    (B[1] - A[1, 4]*x1[k] - A[2, 4]*x2[k] - A[3, 4]*x3[k])/A[4, 4]
]
k = [1; 2; 3; 4; 5; 6; 7; 8; 9; 10]
x1[k] = [0; 0.285714; 0.0666667; 0.0950113; 0.0813454; 0.0813343; 0.0809479; 0.0806965; 0.0807094; 0.0806767]
x2[k] = [0; 0.6; 0.422222; 0.431111; 0.422363; 0.41916; 0.418984; 0.418492; 0.418478; 0.418433]
x3[k] = [0; 0.222222; 0.211111; 0.222046; 0.226049; 0.22627; 0.226885; 0.226902; 0.226959; 0.226966]
x4[k] = [0; 0.133333; 0.139683; 0.166667; 0.165074; 0.167697; 0.167743; 0.167917; 0.167954; 0.167964]
# Метод Зейлера
k := 1 .. 10
x1[1] := 0
x2[1] := 0
x3[1] := 0
x4[1] := 0
[x1[k + 1]; x2[k + 1]; x3[k + 1]; x4[k + 1]] := [
    (B[1] - A[1, 2]*x2[k] - A[1, 3]*x3[k] - A[1, 4]*x4[k])/A[1, 1];
    (B[2] - A[2, 1]*(B[1] - A[1, 2]*x2[k] - A[1, 3]*x3[k] - A[1, 4]*x4[k])/A[1, 1] - A[2, 3]*x3[k] - A[2, 4]*x4[k])/A[2, 2];
    (B[3] - A[3, 1]*x1[k] - A[3, 2]*(B[2] - A[2, 1]*(B[1] - A[1, 2]*x2[k] - A[1, 3]*x3[k] - A[1, 4]*x4[k])/A[1, 1] - A[2, 3]*x3[k] - A[2, 4]*x4[k])/A[2, 2] - A[3, 4]*x4[k])/A[3, 3];
    (B[1] - A[1, 4]*x1[k] - A[2, 4]*x2[k] - A[3, 4]*(B[3] - A[3, 1]*x1[k] - A[3, 2]*(B[2] - A[2, 1]*(B[1] - A[1, 2]*x2[k] - A[1, 3]*x3[k] - A[1, 4]*x4[k])/A[1, 1] - A[2, 3]*x3[k] - A[2, 4]*x4[k])/A[2, 2] - A[3, 4]*x4[k])/A[3, 3])/A[4, 4]
]
k = [1; 2; 3; 4; 5; 6; 7; 8; 9; 10]
x1[k] = [0; 0.285714; 0.0701587; 0.0847009; 0.0823974; 0.0803586; 0.0807736; 0.0806733; 0.0806711; 0.0806756]
x2[k] = [0; 0.6; 0.448889; 0.419358; 0.422141; 0.418525; 0.418502; 0.418459; 0.41842; 0.418424]
x3[k] = [0; 0.188889; 0.225802; 0.222324; 0.226844; 0.226872; 0.226926; 0.226975; 0.22697; 0.226972]
x4[k] = [0; 0.171111; 0.140399; 0.168444; 0.167409; 0.167721; 0.168004; 0.167959; 0.167971; 0.167971]
