X := [0.1; 0.3; 0.4; 0.6; 0.9]
Y := [0.2; 0.54; 0.55; 0.7; 0.7]
ORIGIN = 0
i := 0 .. 4
D := [
    5, sum(X[i], i), sum((X^2)[i], i);
    sum(X[i], i), sum((X^2)[i], i), sum((X^3)[i], i);
    sum((X^2)[i], i), sum((X^3)[i], i), sum((X^4)[i], i)
]
F := [sum(Y[i], i); sum(X[i]*Y[i], i); sum((X^2)[i]*Y[i], i)]
b := D^-1*F
b = [0.0400565; 1.87308; -1.27159]
P2(x) := b[0] + b[1]*x + b[2]*x^2
O[i] := P2(X[i]) - Y[i]
O = [0.0146489; -0.0524617; 0.0358354; 0.00613398; -0.00415658]
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