X := [0.1; 0.3; 0.4; 0.6; 0.9]
Y := [0.2; 0.54; 0.55; 0.7; 0.7]
ORIGIN = 0
i := 0 .. 4
D := [
    5, sum(X[i], i), sum((X^2)[i], i), sum((X^3)[i], i), sum((X^4)[i], i);
    sum(X[i], i), sum((X^2)[i], i), sum((X^3)[i], i), sum((X^4)[i], i), sum((X^5)[i], i);
    sum((X^2)[i], i), sum((X^3)[i], i), sum((X^4)[i], i), sum((X^5)[i], i), sum((X^6)[i], i);
    sum((X^3)[i], i), sum((X^4)[i], i), sum((X^5)[i], i), sum((X^6)[i], i), sum((X^7)[i], i);
    sum((X^4)[i], i), sum((X^5)[i], i), sum((X^6)[i], i), sum((X^7)[i], i), sum((X^8)[i], i)
]
F := [
    sum(Y[i], i);
    sum(X[i]*Y[i], i);
    sum((X^2)[i]*Y[i], i);
    sum((X^3)[i]*Y[i], i);
    sum((X^4)[i]*Y[i], i)
]
b := D^-1*F
b = [-0.5; 10.0083; -35.0139; 51.9444; -26.3889]
P4(x) := b[0] + b[1]*x + b[2]*x^2 + b[3]*x^3 + b[4]*x^4
O[i] := P4(X[i]) - Y[i]
O = [-5.88751e-13; -8.50464e-12; -6.33726e-12; -1.80356e-11; -2.75981e-11]
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