f(x) := 1/(3*x - 7)
a := 4
b := 5
n := 5
hx := (b - a)/n
# 1. Метод левых прямоугольников
i := 0 .. n - 1
x[i] := a + i*hx
y[i] := f(x[i])
x = [4; 4.2; 4.4; 4.6; 4.8]
y = [0.2; 0.178571; 0.16129; 0.147059; 0.135135]
ILP := hx*sum(f(x[i]), i)
ILP = 0.164411
# 2. Метод правых прямоугольников
i := 1 .. n
x[i] := a + i*hx
y[i] := f(x[i])
x = [4; 4.2; 4.4; 4.6; 4.8; 5]
y = [0.2; 0.178571; 0.16129; 0.147059; 0.135135; 0.125]
IPP := hx*sum(f(x[i]), i)
IPP = 0.149411
# 3. Метод центральных прямоугольников
i := 1 .. n
xc[i] := a + (i - 1/2)*hx
yc[i] := f(xc[i])
xc = [0; 4.1; 4.3; 4.5; 4.7; 4.9]
yc = [0; 0.188679; 0.169492; 0.153846; 0.140845; 0.12987]
ICP := hx*sum(f(xc[i]), i)
ICP = 0.156546
# 4. Метод трапеций
i := 1 .. n - 1
x[i] := a + i*hx
ITR := hx*(((f(a) + f(b))/2) + sum(f(x[i]), i))
ITR = 0.156911
# 5. Метод парабол
i := 1, 3 .. n - 1
S1 := sum(f(x[i]), i)
i := 2, 4 .. n - 2
S2 := sum(f(x[i]), i)
IPR := hx/3*(f(a) + f(b) + 4*S1 + 2*S2)
IPR = 0.130007
I := integral(1/(3*x - 7), x = 4 .. 5)
I = 0.156668
D1 := |I - ILP|
D1 = 0.00774327
D2 := |I - IPP|
D2 = 0.00725673
D3 := |I - ICP|
D3 = 0.000121451
D4 := |I - ITR|
D4 = 0.000243266
D5 := |I - IPR|
D5 = 0.0266611
