C := [1, 0.1; 1, 0.9]
B := [0.2; 0.7]
a := C^-1*B
a = [0.1375; 0.625]
P1(x) := a[0] + a[1]*x
O[1] := P1(0.3) - 0.45
O[1] = -0.125
O[2] := P1(0.4) - 0.55
O[2] = -0.1625
O[3] := P1(0.6) - 0.7
O[3] = -0.1875
X := [0.1; 0.3; 0.4; 0.6; 0.9]
Y := [0.2; 0.54; 0.55; 0.7; 0.7]
xg := 0, 0.1 .. 1
i := 0 .. 4
xg = [0; 0.1; 0.2; 0.3; 0.4; 0.5; 0.6; 0.7; 0.8; 0.9; 1]
P1(xg) = [0.1375; 0.2; 0.2625; 0.325; 0.3875; 0.45; 0.5125; 0.575; 0.6375; 0.7; 0.7625]
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