C := [1, 0.1, 0.01, 0.001; 1, 0.3, 0.09, 0.027; 1, 0.4, 0.16, 0.064; 1, 0.6, 0.36, 0.216]
B := [0.2; 0.45; 0.55; 0.7]
a := C^-1*B
a = [0.05; 1.58333; -0.833333; 1.77636e-14]
P3(x) := a[0] + a[1]*x + a[2]*x^2 + a[3]*x^3
O[4] := P3(0.9) - 0.7
O[4] = 0.1
X := [0.1; 0.3; 0.4; 0.6; 0.9]
Y := [0.2; 0.45; 0.55; 0.7; 0.7]
xg := 0, 0.1 .. 1
i := 0 .. 4
xg = [0; 0.1; 0.2; 0.3; 0.4; 0.5; 0.6; 0.7; 0.8; 0.9; 1]
P3(xg) = [0.05; 0.2; 0.333333; 0.45; 0.55; 0.633333; 0.7; 0.75; 0.783333; 0.8; 0.8]
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